# OpenSim document version 40000
ScaleTool HYOID_Scaled-scaled:
  mass: 74 [kg]
  height: -1
  age: -1
  ModelScaler:
    apply: true
    scaling_order: measurements
    marker_file: ../data/01_preprocessing/car/optitrack/02May2022_Monday/01_2lq1/Take 2022-05-02 01.42.58 PM.trc
    time_range: 12 17
    preserve_mass_distribution: true
    MeasurementSet:
      Measurement HeadWith: apply=true
        MarkerPair: markers=(LZP RZP)
        BodyScale skull: axes=(X Y Z)
        BodyScale jaw: axes=(X Y Z)
      Measurement ShoulderWidth: apply=true
        MarkerPair: markers=(LCAJ RCAJ)
        BodyScale torso: axes=(X Y Z)
        BodyScale pelvis: axes=(X Y Z)
        BodyScale sacrum: axes=(X Y Z)
        BodyScale lumbar5: axes=(X Y Z)
        BodyScale lumbar4: axes=(X Y Z)
        BodyScale lumbar3: axes=(X Y Z)
        BodyScale lumbar2: axes=(X Y Z)
        BodyScale lumbar1: axes=(X Y Z)
      Measurement NeckLength: apply=true
        MarkerPair: markers=(SJN RZP)
        BodyScale cerv7: axes=(X Y Z)
        BodyScale cerv6: axes=(X Y Z)
        BodyScale cerv5: axes=(X Y Z)
        BodyScale cerv4: axes=(X Y Z)
        BodyScale cerv3: axes=(X Y Z)
        BodyScale cerv2: axes=(X Y Z)
        BodyScale cerv1: axes=(X Y Z)
      Measurement ClavicleLength_L: apply=true
        MarkerPair: markers=(SJN LCAJ)
        BodyScale lscapula: axes=(X Y Z)
        BodyScale lclavicle: axes=(X Y Z)
      Measurement ClavicleLength_R: apply=true
        MarkerPair: markers=(SJN RCAJ)
        BodyScale rscapula: axes=(X Y Z)
        BodyScale rclavicle: axes=(X Y Z)
  MarkerPlacer:
    apply: true
    marker_file: ../data/01_preprocessing/car/optitrack/02May2022_Monday/01_2lq1/Take 2022-05-02 01.42.58 PM.trc
    time_range: 12 17
    max_marker_movement: -1
    IKTaskSet:
      IKMarkerTask SJN: apply=true weight=20
      IKMarkerTask GLA: apply=true weight=20
      IKMarkerTask RZF: apply=true weight=10
      IKMarkerTask LZF: apply=true weight=10
      IKMarkerTask RZP: apply=true weight=10
      IKMarkerTask LZP: apply=true weight=10
      IKMarkerTask RCAJ: apply=true weight=10
      IKMarkerTask LCAJ: apply=true weight=10
      IKMarkerTask RC: apply=true weight=0
      IKMarkerTask LC: apply=true weight=0
      IKMarkerTask RN: apply=true weight=0
      IKMarkerTask LN: apply=true weight=0
