# OpenSim document version 40600
Model Lumbar_C_210:
  gravity: 0 -9.80665 0
  length_units: meters
  force_units: N
  Ground
  BodySet:
    Body pelvis: mass=0 [kg] mass_center=(0 0 0) inertia=(0 0 0 0 0 0) meshes=(pelvis_rv.vtp pelvis_lv.vtp)
    Body sacrum: mass=7.486 mass_center=(0 0 0) inertia=(0.075 0.08 0.03 0 0 0) meshes=sacrum.vtp
    Body lumbar5: mass=1.824 mass_center=(0.053744 0.02 0) inertia=(0.01219 0.01765 0.00546 0 0 0) meshes=lumbar5.vtp
    Body lumbar4: mass=1.799 mass_center=(0.0170296 0.018 0) inertia=(0.01123 0.01643 0.0052 0 0 0) meshes=lumbar4.vtp
    Body lumbar3: mass=1.67 mass_center=(0.0136848 0.018 0) inertia=(0.01066 0.01608 0.00551 0 0 0) meshes=lumbar3.vtp
    Body lumbar2: mass=1.689 mass_center=(0.0245272 0.018 0) inertia=(0.01091 0.01682 0.00591 0 0 0) meshes=lumbar2.vtp
    Body lumbar1: mass=1.677 mass_center=(0.039 0.017 0) inertia=(0.01113 0.01753 0.0064 0 0 0) meshes=lumbar1.vtp
    Body torso: mass=18.619 mass_center=(0.0046 0.246 0) inertia=(0.165 0.15 0.125 0 0 0)
        meshes=(thoracic12_s.vtp thoracic11_s.vtp thoracic10_s.vtp thoracic9_s.vtp thoracic8_s.vtp thoracic7_s.vtp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)
    ObjectGroup Lumbar_Vertebrae: members=(lumbar1 lumbar2 lumbar3 lumbar4 lumbar5)
  JointSet:
    FreeJoint gndpelvis: socket_parent_frame=ground_offset socket_child_frame=pelvis_offset
      Coordinate gndroll: default_value=0 range=(-3.141593 3.141593) clamped=false
      Coordinate gndyaw: default_value=0 range=(-3.141593 3.141593) clamped=false
      Coordinate gndpitch: default_value=0.384 range=(-3.141593 3.141593) clamped=false
      Coordinate spine_tx: default_value=0 range=(-1 1) clamped=false
      Coordinate spine_ty: default_value=0 range=(-1 1) clamped=false
      Coordinate spine_tz: default_value=0 range=(-1 1) clamped=false
      PhysicalOffsetFrame ground_offset: socket_parent=/ground translation=(0 0 0) [meters]
      PhysicalOffsetFrame pelvis_offset: socket_parent=/bodyset/pelvis translation=(-0.1 -0.15 0)
    WeldJoint gndsacrum: socket_parent_frame=pelvis_offset socket_child_frame=sacrum_offset
      PhysicalOffsetFrame pelvis_offset: socket_parent=/bodyset/pelvis translation=(0 0 0)
      PhysicalOffsetFrame sacrum_offset: socket_parent=/bodyset/sacrum translation=(0 0 0)
    CustomJoint L5_S1_IVDjnt: socket_parent_frame=sacrum_offset socket_child_frame=lumbar5_offset
      Coordinate flex_extension: default_value=1.387576e-17 range=(-1.22173 0.4537856) clamped=false
      Coordinate lat_bending: default_value=4.318642e-19 range=(-0.4363323 0.4363323) clamped=false
      Coordinate axial_rotation: default_value=-4.163336e-17 range=(-0.7853982 0.7853982) clamped=false
      PhysicalOffsetFrame sacrum_offset: socket_parent=/bodyset/sacrum translation=(-0.098 0.071 0)
      PhysicalOffsetFrame lumbar5_offset: socket_parent=/bodyset/lumbar5 translation=(0 0 0)
      SpatialTransform:
        TransformAxis rotation1: coordinates=flex_extension axis=(0 0 1) LinearFunction(coefficients=0.125 0)
        TransformAxis rotation2: coordinates=lat_bending axis=(1 0 0) LinearFunction(coefficients=0.1356 0)
        TransformAxis rotation3: coordinates=axial_rotation axis=(0 1 0) LinearFunction(coefficients=0.2077922 0)
        TransformAxis translation1: axis=(1 0 0)
        TransformAxis translation2: axis=(0 1 0)
        TransformAxis translation3: axis=(0 0 1)
    CustomJoint L4_L5_IVDjnt: socket_parent_frame=lumbar5_offset socket_child_frame=lumbar4_offset
      Coordinate L4_L5_FE: default_value=2.567015e-18 range=(-99999.9 99999.9) clamped=false
      Coordinate L4_L5_LB: default_value=7.820464e-20 range=(-99999.9 99999.9) clamped=false
      Coordinate L4_L5_AR: default_value=-6.938894e-18 range=(-99999.9 99999.9) clamped=false
      PhysicalOffsetFrame lumbar5_offset: socket_parent=/bodyset/lumbar5 translation=(0.01 0.0296 0)
      PhysicalOffsetFrame lumbar4_offset: socket_parent=/bodyset/lumbar4 translation=(0.001 -0.0025 0)
      SpatialTransform: axes_held_at_zero=(translation1 translation2 translation3)
        TransformAxis rotation1: coordinates=L4_L5_FE axis=(0 0 1) LinearFunction(coefficients=1 0)
        TransformAxis rotation2: coordinates=L4_L5_LB axis=(1 0 0) LinearFunction(coefficients=1 0)
        TransformAxis rotation3: coordinates=L4_L5_AR axis=(0 1 0) LinearFunction(coefficients=1 0)
    CustomJoint L3_L4_IVDjnt: socket_parent_frame=lumbar4_offset socket_child_frame=lumbar3_offset
      Coordinate L3_L4_FE: default_value=2.830655e-18 range=(-99999.9 99999.9) clamped=false
      Coordinate L3_L4_LB: default_value=1.059501e-19 range=(-99999.9 99999.9) clamped=false
      Coordinate L3_L4_AR: default_value=-6.938894e-18 range=(-99999.9 99999.9) clamped=false
      PhysicalOffsetFrame lumbar4_offset: socket_parent=/bodyset/lumbar4 translation=(0 0.032 0)
      PhysicalOffsetFrame lumbar3_offset: socket_parent=/bodyset/lumbar3 translation=(-0.0006 -0.0012 0)
      SpatialTransform: axes_held_at_zero=(translation1 translation2 translation3)
        TransformAxis rotation1: coordinates=L3_L4_FE axis=(0 0 1) LinearFunction(coefficients=1 0)
        TransformAxis rotation2: coordinates=L3_L4_LB axis=(1 0 0) LinearFunction(coefficients=1 0)
        TransformAxis rotation3: coordinates=L3_L4_AR axis=(0 1 0) LinearFunction(coefficients=1 0)
    CustomJoint L2_L3_IVDjnt: socket_parent_frame=lumbar3_offset socket_child_frame=lumbar2_offset
      Coordinate L2_L3_FE: default_value=3.2053e-18 range=(-99999.9 99999.9) clamped=false
      Coordinate L2_L3_LB: default_value=1.080216e-19 range=(-99999.9 99999.9) clamped=false
      Coordinate L2_L3_AR: default_value=-6.938894e-18 range=(-99999.9 99999.9) clamped=false
      PhysicalOffsetFrame lumbar3_offset: socket_parent=/bodyset/lumbar3 translation=(-0.008 0.0312 0)
      PhysicalOffsetFrame lumbar2_offset: socket_parent=/bodyset/lumbar2 translation=(-0.0013 -0.0039 0)
      SpatialTransform: axes_held_at_zero=(translation1 translation2 translation3)
        TransformAxis rotation1: coordinates=L2_L3_FE axis=(0 0 1) LinearFunction(coefficients=1 0)
        TransformAxis rotation2: coordinates=L2_L3_LB axis=(1 0 0) LinearFunction(coefficients=1 0)
        TransformAxis rotation3: coordinates=L2_L3_AR axis=(0 1 0) LinearFunction(coefficients=1 0)
    CustomJoint L1_L2_IVDjnt: socket_parent_frame=lumbar2_offset socket_child_frame=lumbar1_offset
      Coordinate L1_L2_FE: default_value=3.538318e-18 range=(-99999.9 99999.9) clamped=false
      Coordinate L1_L2_LB: default_value=8.119048e-20 range=(-99999.9 99999.9) clamped=false
      Coordinate L1_L2_AR: default_value=-6.938894e-18 range=(-99999.9 99999.9) clamped=false
      PhysicalOffsetFrame lumbar2_offset: socket_parent=/bodyset/lumbar2 translation=(-0.01 0.025 0)
      PhysicalOffsetFrame lumbar1_offset: socket_parent=/bodyset/lumbar1 translation=(0.0014 -0.0038 0)
      SpatialTransform: axes_held_at_zero=(translation1 translation2 translation3)
        TransformAxis rotation1: coordinates=L1_L2_FE axis=(0 0 1) LinearFunction(coefficients=1 0)
        TransformAxis rotation2: coordinates=L1_L2_LB axis=(1 0 0) LinearFunction(coefficients=1 0)
        TransformAxis rotation3: coordinates=L1_L2_AR axis=(0 1 0) LinearFunction(coefficients=1 0)
    WeldJoint torsojnt: socket_parent_frame=lumbar1_offset socket_child_frame=torso_offset
      PhysicalOffsetFrame lumbar1_offset: socket_parent=/bodyset/lumbar1 translation=(0.0025 -0.089 0)
      PhysicalOffsetFrame torso_offset: socket_parent=/bodyset/torso translation=(0 0 0)
  ConstraintSet:
    CoordinateCouplerConstraint L4_L5_FE_con: independent_coordinate_names=flex_extension
        dependent_coordinate_name=L4_L5_FE scale_factor=1
        coupled_coordinates_function=LinearFunction(coefficients=0.185 0)
    CoordinateCouplerConstraint L4_L5_AR_con: independent_coordinate_names=axial_rotation
        dependent_coordinate_name=L4_L5_AR scale_factor=1
        coupled_coordinates_function=LinearFunction(coefficients=0.2207792 0)
    CoordinateCouplerConstraint L4_L5_LB_con: independent_coordinate_names=lat_bending
        dependent_coordinate_name=L4_L5_LB scale_factor=1
        coupled_coordinates_function=LinearFunction(coefficients=0.1810862 0)
    CoordinateCouplerConstraint L3_L4_FE_con: independent_coordinate_names=flex_extension
        dependent_coordinate_name=L3_L4_FE scale_factor=1
        coupled_coordinates_function=LinearFunction(coefficients=0.204 0)
    CoordinateCouplerConstraint L3_L4_AR_con: independent_coordinate_names=axial_rotation
        dependent_coordinate_name=L3_L4_AR scale_factor=1
        coupled_coordinates_function=LinearFunction(coefficients=0.2207792 0)
    CoordinateCouplerConstraint L3_L4_LB_con: independent_coordinate_names=lat_bending
        dependent_coordinate_name=L3_L4_LB scale_factor=1
        coupled_coordinates_function=LinearFunction(coefficients=0.245332 0)
    CoordinateCouplerConstraint L2_L3_FE_con: independent_coordinate_names=flex_extension
        dependent_coordinate_name=L2_L3_FE scale_factor=1
        coupled_coordinates_function=LinearFunction(coefficients=0.231 0)
    CoordinateCouplerConstraint L2_L3_AR_con: independent_coordinate_names=axial_rotation
        dependent_coordinate_name=L2_L3_AR scale_factor=1
        coupled_coordinates_function=LinearFunction(coefficients=0.1818182 0)
    CoordinateCouplerConstraint L2_L3_LB_con: independent_coordinate_names=lat_bending
        dependent_coordinate_name=L2_L3_LB scale_factor=1
        coupled_coordinates_function=LinearFunction(coefficients=0.2501285 0)
    CoordinateCouplerConstraint L1_L2_FE_con: independent_coordinate_names=flex_extension
        dependent_coordinate_name=L1_L2_FE scale_factor=1
        coupled_coordinates_function=LinearFunction(coefficients=0.255 0)
    CoordinateCouplerConstraint L1_L2_AR_con: independent_coordinate_names=axial_rotation
        dependent_coordinate_name=L1_L2_AR scale_factor=1
        coupled_coordinates_function=LinearFunction(coefficients=0.1688312 0)
    CoordinateCouplerConstraint L1_L2_LB_con: independent_coordinate_names=lat_bending
        dependent_coordinate_name=L1_L2_LB scale_factor=1
        coupled_coordinates_function=LinearFunction(coefficients=0.188 0)
