# OpenSim document version 40600
Model passengerModel:
  gravity: 0 -9.80665 0
  credits: Matthew Millard, University of Stuttgart
  length_units: meters
  force_units: N
  publications:
    [1] Christophy M, Faruk Senan NA, Lotz JC, O'Reilly OM (2012). A Musculoskeletal model for the lumbar spine. Biomech Model Mechanobiol 11, 19–34. https://doi.org/10.1007/s10237-011-0290-6, [2] Mortensen JD, Vasavada AN, Merryweather AS (2018) The inclusion of hyoid muscles improve moment generating capacity and dynamic simulations in musculoskeletal models of the head and neck. PLOS ONE 13(6): e0199912. https://doi.org/10.1371/journal.pone.0199912
  Ground
  BodySet:
    Body pelvis: mass=0 [kg] mass_center=(0 0 0) inertia=(0 0 0 0 0 0) meshes=(pelvis_rv.vtp pelvis_lv.vtp)
    Body sacrum: mass=7.486 mass_center=(0 0 0) inertia=(0.075 0.08 0.03 0 0 0) meshes=sacrum.vtp
    Body lumbar5: mass=1.824 mass_center=(0.053744 0.02 0) inertia=(0.01219 0.01765 0.00546 0 0 0) meshes=lumbar5.vtp
    Body lumbar4: mass=1.799 mass_center=(0.0170296 0.018 0) inertia=(0.01123 0.01643 0.0052 0 0 0) meshes=lumbar4.vtp
    Body lumbar3: mass=1.67 mass_center=(0.0136848 0.018 0) inertia=(0.01066 0.01608 0.00551 0 0 0) meshes=lumbar3.vtp
    Body lumbar2: mass=1.689 mass_center=(0.0245272 0.018 0) inertia=(0.01091 0.01682 0.00591 0 0 0) meshes=lumbar2.vtp
    Body lumbar1: mass=1.677 mass_center=(0.039 0.017 0) inertia=(0.01113 0.01753 0.0064 0 0 0) meshes=lumbar1.vtp
    Body torso: mass=18.619 mass_center=(0.0046 0.246 0) inertia=(0.165 0.15 0.125 0 0 0)
        meshes=(thoracic12_s.vtp thoracic11_s.vtp thoracic10_s.vtp thoracic9_s.vtp thoracic8_s.vtp thoracic7_s.vtp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)
    Body rscapula: mass=0.8945958 mass_center=(0 0 0) inertia=(0.7105454 0.7105454 0.3552727 0 0 0) meshes=rscapula.vtp
    Body rclavicle: mass=0.8945958 mass_center=(0 0 0) inertia=(0.7105454 0.7105454 0.3552727 0 0 0)
        meshes=rclavicle.vtp
    Body lscapula: mass=0.8945958 mass_center=(0 0 0) inertia=(0.7105454 0.7105454 0.3552727 0 0 0) meshes=lscapula.vtp
    Body lclavicle: mass=0.8945958 mass_center=(0 0 0) inertia=(0.7105454 0.7105454 0.3552727 0 0 0)
        meshes=lclavicle.vtp
    Body cerv7: mass=0.5225197 mass_center=(-0.0002184541 0.007755121 0)
        inertia=(0.02134604 0.08538417 0.02134604 0 0 0) meshes=rotatedcerv7.vtp
    Body cerv6: mass=0.45423 mass_center=(0.0002184541 0.006990532 0) inertia=(0.02134604 0.08538417 0.02134604 0 0 0)
        meshes=cerv6.vtp
    Body cerv5: mass=0.3838711 mass_center=(0.0001092271 0.006881305 0)
        inertia=(0.02134604 0.08538417 0.02134604 0 0 0) meshes=cerv5.vtp
    Body cerv4: mass=0.3786975 mass_center=(-0.0003276812 0.007318213 0)
        inertia=(0.02134604 0.08538417 0.02134604 0 0 0) meshes=cerv4.vtp
    Body cerv3: mass=0.3755934 mass_center=(-0.0008738165 0.007755121 0)
        inertia=(0.02134604 0.08538417 0.02134604 0 0 0) meshes=cerv3.vtp
    Body cerv2: mass=0.5256238 mass_center=(-0.001092271 0.006444397 0)
        inertia=(0.02134604 0.08538417 0.02134604 0 0 0) meshes=cerv2.vtp
    Body cerv1: mass=0.4180158 mass_center=(0.03407884 0.002075314 0) inertia=(0.02134604 0.08538417 0.02134604 0 0 0)
        meshes=cerv1.vtp
    Body skull: mass=3.846762 mass_center=(0.01637875 0.05964516 0) inertia=(0.01662247 0.01202783 0.01812595 0 0 0)
        meshes=skull.vtp
    Body jaw: mass=0 mass_center=(0 0.04733743 0) inertia=(0 0 0 0 0 0) meshes=jaw.vtp
    ObjectGroup Lumbar_Vertebrae: members=(lumbar1 lumbar2 lumbar3 lumbar4 lumbar5)
  JointSet:
    FreeJoint gndpelvis: socket_parent_frame=ground_offset socket_child_frame=pelvis_offset
      Coordinate gndroll: default_value=0 range=(-3.141593 3.141593) clamped=false
      Coordinate gndyaw: default_value=0 range=(-3.141593 3.141593) clamped=false
      Coordinate gndpitch: default_value=0.384 range=(-3.141593 3.141593) clamped=false
      Coordinate gndx: default_value=0 range=(-1 1) clamped=false
      Coordinate gndy: default_value=0 range=(-1 1) clamped=false
      Coordinate gndz: default_value=0 range=(-1 1) clamped=false
      PhysicalOffsetFrame ground_offset: socket_parent=/ground translation=(0 0 0) [meters]
      PhysicalOffsetFrame pelvis_offset: socket_parent=/bodyset/pelvis translation=(-0.1 -0.15 0)
    WeldJoint gndsacrum: socket_parent_frame=pelvis_offset socket_child_frame=sacrum_offset
      PhysicalOffsetFrame pelvis_offset: socket_parent=/bodyset/pelvis translation=(0 0 0)
      PhysicalOffsetFrame sacrum_offset: socket_parent=/bodyset/sacrum translation=(0 0 0)
    CustomJoint L5_S1_IVDjnt: socket_parent_frame=sacrum_offset socket_child_frame=lumbar5_offset
      Coordinate flex_extension: default_value=1.387576e-17 range=(-1.22173 0.4537856) clamped=false
      Coordinate lat_bending: default_value=4.318642e-19 range=(-0.4363323 0.4363323) clamped=false
      Coordinate axial_rotation: default_value=-4.163228e-17 range=(-0.7853982 0.7853982) clamped=false
      PhysicalOffsetFrame sacrum_offset: socket_parent=/bodyset/sacrum translation=(-0.098 0.071 0)
      PhysicalOffsetFrame lumbar5_offset: socket_parent=/bodyset/lumbar5 translation=(0 0 0)
      SpatialTransform:
        TransformAxis rotation1: coordinates=flex_extension axis=(0 0 1) LinearFunction(coefficients=0.125 0)
        TransformAxis rotation2: coordinates=lat_bending axis=(1 0 0) LinearFunction(coefficients=0.1356 0)
        TransformAxis rotation3: coordinates=axial_rotation axis=(0 1 0) LinearFunction(coefficients=0.207792 0)
        TransformAxis translation1: axis=(1 0 0)
        TransformAxis translation2: axis=(0 1 0)
        TransformAxis translation3: axis=(0 0 1)
    CustomJoint L4_L5_IVDjnt: socket_parent_frame=lumbar5_offset socket_child_frame=lumbar4_offset
      Coordinate L4_L5_FE: default_value=2.567015e-18 range=(-99999.9 99999.9) clamped=false
      Coordinate L4_L5_LB: default_value=7.820464e-20 range=(-99999.9 99999.9) clamped=false
      Coordinate L4_L5_AR: default_value=-9.191543e-18 range=(-99999.9 99999.9) clamped=false
      PhysicalOffsetFrame lumbar5_offset: socket_parent=/bodyset/lumbar5 translation=(0.01 0.0296 0)
      PhysicalOffsetFrame lumbar4_offset: socket_parent=/bodyset/lumbar4 translation=(0.001 -0.0025 0)
      SpatialTransform: axes_held_at_zero=(translation1 translation2 translation3)
        TransformAxis rotation1: coordinates=L4_L5_FE axis=(0 0 1) LinearFunction(coefficients=1 0)
        TransformAxis rotation2: coordinates=L4_L5_LB axis=(1 0 0) LinearFunction(coefficients=1 0)
        TransformAxis rotation3: coordinates=L4_L5_AR axis=(0 1 0) LinearFunction(coefficients=1 0)
    CustomJoint L3_L4_IVDjnt: socket_parent_frame=lumbar4_offset socket_child_frame=lumbar3_offset
      Coordinate L3_L4_FE: default_value=2.830655e-18 range=(-99999.9 99999.9) clamped=false
      Coordinate L3_L4_LB: default_value=1.059501e-19 range=(-99999.9 99999.9) clamped=false
      Coordinate L3_L4_AR: default_value=-9.191543e-18 range=(-99999.9 99999.9) clamped=false
      PhysicalOffsetFrame lumbar4_offset: socket_parent=/bodyset/lumbar4 translation=(0 0.032 0)
      PhysicalOffsetFrame lumbar3_offset: socket_parent=/bodyset/lumbar3 translation=(-0.0006 -0.0012 0)
      SpatialTransform: axes_held_at_zero=(translation1 translation2 translation3)
        TransformAxis rotation1: coordinates=L3_L4_FE axis=(0 0 1) LinearFunction(coefficients=1 0)
        TransformAxis rotation2: coordinates=L3_L4_LB axis=(1 0 0) LinearFunction(coefficients=1 0)
        TransformAxis rotation3: coordinates=L3_L4_AR axis=(0 1 0) LinearFunction(coefficients=1 0)
    CustomJoint L2_L3_IVDjnt: socket_parent_frame=lumbar3_offset socket_child_frame=lumbar2_offset
      Coordinate L2_L3_FE: default_value=3.2053e-18 range=(-99999.9 99999.9) clamped=false
      Coordinate L2_L3_LB: default_value=1.080216e-19 range=(-99999.9 99999.9) clamped=false
      Coordinate L2_L3_AR: default_value=-7.569506e-18 range=(-99999.9 99999.9) clamped=false
      PhysicalOffsetFrame lumbar3_offset: socket_parent=/bodyset/lumbar3 translation=(-0.008 0.0312 0)
      PhysicalOffsetFrame lumbar2_offset: socket_parent=/bodyset/lumbar2 translation=(-0.0013 -0.0039 0)
      SpatialTransform: axes_held_at_zero=(translation1 translation2 translation3)
        TransformAxis rotation1: coordinates=L2_L3_FE axis=(0 0 1) LinearFunction(coefficients=1 0)
        TransformAxis rotation2: coordinates=L2_L3_LB axis=(1 0 0) LinearFunction(coefficients=1 0)
        TransformAxis rotation3: coordinates=L2_L3_AR axis=(0 1 0) LinearFunction(coefficients=1 0)
    CustomJoint L1_L2_IVDjnt: socket_parent_frame=lumbar2_offset socket_child_frame=lumbar1_offset
      Coordinate L1_L2_FE: default_value=3.538318e-18 range=(-99999.9 99999.9) clamped=false
      Coordinate L1_L2_LB: default_value=8.119048e-20 range=(-99999.9 99999.9) clamped=false
      Coordinate L1_L2_AR: default_value=-7.028827e-18 range=(-99999.9 99999.9) clamped=false
      PhysicalOffsetFrame lumbar2_offset: socket_parent=/bodyset/lumbar2 translation=(-0.01 0.025 0)
      PhysicalOffsetFrame lumbar1_offset: socket_parent=/bodyset/lumbar1 translation=(0.0014 -0.0038 0)
      SpatialTransform: axes_held_at_zero=(translation1 translation2 translation3)
        TransformAxis rotation1: coordinates=L1_L2_FE axis=(0 0 1) LinearFunction(coefficients=1 0)
        TransformAxis rotation2: coordinates=L1_L2_LB axis=(1 0 0) LinearFunction(coefficients=1 0)
        TransformAxis rotation3: coordinates=L1_L2_AR axis=(0 1 0) LinearFunction(coefficients=1 0)
    WeldJoint torsojnt: socket_parent_frame=lumbar1_offset socket_child_frame=torso_offset
      PhysicalOffsetFrame lumbar1_offset: socket_parent=/bodyset/lumbar1 translation=(0.0025 -0.089 0)
      PhysicalOffsetFrame torso_offset: socket_parent=/bodyset/torso translation=(0 0 0)
    WeldJoint rscapulajnt: socket_parent_frame=torso_offset socket_child_frame=rscapula_offset
      PhysicalOffsetFrame torso_offset: socket_parent=/bodyset/torso translation=(-0.019 0.395 0.16)
          orientation=(0.174533 -0.296706 -0.174533) [radians]
      PhysicalOffsetFrame rscapula_offset: socket_parent=/bodyset/rscapula translation=(0 0 0)
    WeldJoint rclaviclejnt: socket_parent_frame=torso_offset socket_child_frame=rclavicle_offset
      PhysicalOffsetFrame torso_offset: socket_parent=/bodyset/torso translation=(0.01 0.37 0.01960673)
          orientation=(0 0.139626 0)
      PhysicalOffsetFrame rclavicle_offset: socket_parent=/bodyset/rclavicle translation=(0 0 0)
    WeldJoint lscapulajnt: socket_parent_frame=torso_offset socket_child_frame=lscapula_offset
      PhysicalOffsetFrame torso_offset: socket_parent=/bodyset/torso translation=(-0.019 0.395 -0.16)
          orientation=(-0.174533 0.296706 -0.174533)
      PhysicalOffsetFrame lscapula_offset: socket_parent=/bodyset/lscapula translation=(0 0 0)
    WeldJoint lclaviclejnt: socket_parent_frame=torso_offset socket_child_frame=lclavicle_offset
      PhysicalOffsetFrame torso_offset: socket_parent=/bodyset/torso translation=(0.01 0.37 -0.01960673)
          orientation=(0 -0.139626 0)
      PhysicalOffsetFrame lclavicle_offset: socket_parent=/bodyset/lclavicle translation=(0 0 0)
    CustomJoint auxt1jnt: socket_parent_frame=torso_offset socket_child_frame=cerv7_offset
      Coordinate pitch2: default_value=0.06 range=(-0.716 0.716) clamped=true
      Coordinate roll2: default_value=-0.007 range=(-0.585 0.585) clamped=true
      Coordinate yaw2: default_value=0.017 range=(-0.48 0.48) clamped=true
      PhysicalOffsetFrame torso_offset: socket_parent=/bodyset/torso translation=(-0.02 0.39 0)
      PhysicalOffsetFrame cerv7_offset: socket_parent=/bodyset/cerv7 translation=(0.007471131 -0.00617679 0)
      SpatialTransform: axes_held_at_zero=(translation1 translation2 translation3)
        TransformAxis rotation1: coordinates=pitch2 axis=(0 0 1)
          SimmSpline: x=(-1.74533 1.74533) y=(-0.172788 0.172788)
        TransformAxis rotation2: coordinates=roll2 axis=(1 0 0)
          SimmSpline: x=(-1.74533 1.74533) y=(-0.136136 0.136136)
        TransformAxis rotation3: coordinates=yaw2 axis=(0 1 0)
          SimmSpline: x=(-1.74533 1.74533) y=(-0.109956 0.109956)
    CustomJoint aux7jnt: socket_parent_frame=cerv7_offset socket_child_frame=cerv6_offset
      Coordinate aux7jnt_r3: default_value=0.01122001 range=(-99999.9 99999.9) clamped=false
      Coordinate aux7jnt_r1: default_value=-0.0009589992 range=(-99999.9 99999.9) clamped=false
      Coordinate aux7jnt_r2: default_value=0.003196 range=(-99999.9 99999.9) clamped=false
      PhysicalOffsetFrame cerv7_offset: socket_parent=/bodyset/cerv7 translation=(0.01447914 0.01352231 0)
      PhysicalOffsetFrame cerv6_offset: socket_parent=/bodyset/cerv6 translation=(0.0102881 -0.00444008 0)
      SpatialTransform: axes_held_at_zero=(translation1 translation2 translation3)
        TransformAxis rotation1: coordinates=aux7jnt_r3 axis=(0 0 1) LinearFunction(coefficients=1 0)
        TransformAxis rotation2: coordinates=aux7jnt_r1 axis=(1 0 0) LinearFunction(coefficients=1 0)
        TransformAxis rotation3: coordinates=aux7jnt_r2 axis=(0 1 0) LinearFunction(coefficients=1 0)
    CustomJoint aux6jnt: socket_parent_frame=cerv6_offset socket_child_frame=cerv5_offset
      Coordinate aux6jnt_r3: default_value=0.01319998 range=(-99999.9 99999.9) clamped=false
      Coordinate aux6jnt_r1: default_value=-0.001099001 range=(-99999.9 99999.9) clamped=false
      Coordinate aux6jnt_r2: default_value=0.003722998 range=(-99999.9 99999.9) clamped=false
      PhysicalOffsetFrame cerv6_offset: socket_parent=/bodyset/cerv6 translation=(0.01075887 0.01064964 0)
      PhysicalOffsetFrame cerv5_offset: socket_parent=/bodyset/cerv5 translation=(0.006193174 -0.008902006 0)
      SpatialTransform: axes_held_at_zero=(translation1 translation2 translation3)
        TransformAxis rotation1: coordinates=aux6jnt_r3 axis=(0 0 1) LinearFunction(coefficients=1 0)
        TransformAxis rotation2: coordinates=aux6jnt_r1 axis=(1 0 0) LinearFunction(coefficients=1 0)
        TransformAxis rotation3: coordinates=aux6jnt_r2 axis=(0 1 0) LinearFunction(coefficients=1 0)
    CustomJoint aux5jnt: socket_parent_frame=cerv5_offset socket_child_frame=cerv4_offset
      Coordinate aux5jnt_r3: default_value=0.01319998 range=(-99999.9 99999.9) clamped=false
      Coordinate aux5jnt_r1: default_value=-0.001511999 range=(-99999.9 99999.9) clamped=false
      Coordinate aux5jnt_r2: default_value=0.003722998 range=(-99999.9 99999.9) clamped=false
      PhysicalOffsetFrame cerv5_offset: socket_parent=/bodyset/cerv5 translation=(0.009207841 0.008137416 0)
      PhysicalOffsetFrame cerv4_offset: socket_parent=/bodyset/cerv4 translation=(0.005483199 -0.01280141 0)
      SpatialTransform: axes_held_at_zero=(translation1 translation2 translation3)
        TransformAxis rotation1: coordinates=aux5jnt_r3 axis=(0 0 1) LinearFunction(coefficients=1 0)
        TransformAxis rotation2: coordinates=aux5jnt_r1 axis=(1 0 0) LinearFunction(coefficients=1 0)
        TransformAxis rotation3: coordinates=aux5jnt_r2 axis=(0 1 0) LinearFunction(coefficients=1 0)
    CustomJoint aux4jnt: socket_parent_frame=cerv4_offset socket_child_frame=cerv3_offset
      Coordinate aux4jnt_r3: default_value=0.009899984 range=(-99999.9 99999.9) clamped=false
      Coordinate aux4jnt_r1: default_value=-0.001511999 range=(-99999.9 99999.9) clamped=false
      Coordinate aux4jnt_r2: default_value=0.003722998 range=(-99999.9 99999.9) clamped=false
      PhysicalOffsetFrame cerv4_offset: socket_parent=/bodyset/cerv4 translation=(0.007995421 0.006968687 0)
      PhysicalOffsetFrame cerv3_offset: socket_parent=/bodyset/cerv3 translation=(0.005144595 -0.009852281 0)
      SpatialTransform: axes_held_at_zero=(translation1 translation2 translation3)
        TransformAxis rotation1: coordinates=aux4jnt_r3 axis=(0 0 1) LinearFunction(coefficients=1 0)
        TransformAxis rotation2: coordinates=aux4jnt_r1 axis=(1 0 0) LinearFunction(coefficients=1 0)
        TransformAxis rotation3: coordinates=aux4jnt_r2 axis=(0 1 0) LinearFunction(coefficients=1 0)
    CustomJoint aux3jnt: socket_parent_frame=cerv3_offset socket_child_frame=cerv2_offset
      Coordinate aux3jnt_r3: default_value=0.006599989 range=(-99999.9 99999.9) clamped=false
      Coordinate aux3jnt_r1: default_value=-0.001372001 range=(-99999.9 99999.9) clamped=false
      Coordinate aux3jnt_r2: default_value=0.001598 range=(-99999.9 99999.9) clamped=false
      PhysicalOffsetFrame cerv3_offset: socket_parent=/bodyset/cerv3 translation=(0.005734421 0.005526889 0)
      PhysicalOffsetFrame cerv2_offset: socket_parent=/bodyset/cerv2 translation=(0.00593103 -0.0122662 0)
      SpatialTransform: axes_held_at_zero=(translation1 translation2 translation3)
        TransformAxis rotation1: coordinates=aux3jnt_r3 axis=(0 0 1) LinearFunction(coefficients=1 0)
        TransformAxis rotation2: coordinates=aux3jnt_r1 axis=(1 0 0) LinearFunction(coefficients=1 0)
        TransformAxis rotation3: coordinates=aux3jnt_r2 axis=(0 1 0) LinearFunction(coefficients=1 0)
    CustomJoint aux2jnt: socket_parent_frame=cerv2_offset socket_child_frame=cerv1_offset
      Coordinate pitch1: default_value=0.009000001 range=(-0.349 0.349) clamped=true
      Coordinate roll1: default_value=-2.576641e-11 range=(-0.113 0.113) clamped=true
      Coordinate yaw1: default_value=-0.032 range=(-0.672 0.672) clamped=true
      PhysicalOffsetFrame cerv2_offset: socket_parent=/bodyset/cerv2 translation=(0.007525745 0.02324352 0)
      PhysicalOffsetFrame cerv1_offset: socket_parent=/bodyset/cerv1 translation=(0.04636689 0.003844793 0)
      SpatialTransform: axes_held_at_zero=(translation1 translation2 translation3)
        TransformAxis rotation1: coordinates=pitch1 axis=(0 0 1)
          SimmSpline: x=(-1.74533 1.74533) y=(-0.774926 0.774926)
        TransformAxis rotation2: coordinates=roll1 axis=(1 0 0)
          SimmSpline: x=(-1.74533 1.74533) y=(-0.872665 0.872665)
        TransformAxis rotation3: coordinates=yaw1 axis=(0 1 0)
          SimmSpline: x=(-1.74533 1.74533) y=(-1.5516 1.5516)
    CustomJoint aux1jnt: socket_parent_frame=cerv1_offset socket_child_frame=skull_offset
      Coordinate aux1jnt_r3: default_value=0.005003998 range=(-99999.9 99999.9) clamped=false
      Coordinate aux1jnt_r1: default_value=-1.288325e-11 range=(-99999.9 99999.9) clamped=false
      Coordinate aux1jnt_r2: default_value=-0.003552007 range=(-99999.9 99999.9) clamped=false
      PhysicalOffsetFrame cerv1_offset: socket_parent=/bodyset/cerv1 translation=(0.04734993 0.01629668 0)
      PhysicalOffsetFrame skull_offset: socket_parent=/bodyset/skull translation=(0 0 0)
      SpatialTransform: axes_held_at_zero=(translation1 translation2 translation3)
        TransformAxis rotation1: coordinates=aux1jnt_r3 axis=(0 0 1) LinearFunction(coefficients=1 0)
        TransformAxis rotation2: coordinates=aux1jnt_r1 axis=(1 0 0) LinearFunction(coefficients=1 0)
        TransformAxis rotation3: coordinates=aux1jnt_r2 axis=(0 1 0) LinearFunction(coefficients=1 0)
    WeldJoint jawjnt: socket_parent_frame=skull_offset socket_child_frame=jaw_offset
      PhysicalOffsetFrame skull_offset: socket_parent=/bodyset/skull translation=(0 0 0)
      PhysicalOffsetFrame jaw_offset: socket_parent=/bodyset/jaw translation=(0 0 0)
  ConstraintSet:
    CoordinateCouplerConstraint L4_L5_FE_con: independent_coordinate_names=flex_extension
        dependent_coordinate_name=L4_L5_FE scale_factor=1
        coupled_coordinates_function=LinearFunction(coefficients=0.185 0)
    CoordinateCouplerConstraint L4_L5_AR_con: independent_coordinate_names=axial_rotation
        dependent_coordinate_name=L4_L5_AR scale_factor=1
        coupled_coordinates_function=LinearFunction(coefficients=0.220779 0)
    CoordinateCouplerConstraint L4_L5_LB_con: independent_coordinate_names=lat_bending
        dependent_coordinate_name=L4_L5_LB scale_factor=1
        coupled_coordinates_function=LinearFunction(coefficients=0.181086 0)
    CoordinateCouplerConstraint L3_L4_FE_con: independent_coordinate_names=flex_extension
        dependent_coordinate_name=L3_L4_FE scale_factor=1
        coupled_coordinates_function=LinearFunction(coefficients=0.204 0)
    CoordinateCouplerConstraint L3_L4_AR_con: independent_coordinate_names=axial_rotation
        dependent_coordinate_name=L3_L4_AR scale_factor=1
        coupled_coordinates_function=LinearFunction(coefficients=0.220779 0)
    CoordinateCouplerConstraint L3_L4_LB_con: independent_coordinate_names=lat_bending
        dependent_coordinate_name=L3_L4_LB scale_factor=1
        coupled_coordinates_function=LinearFunction(coefficients=0.245332 0)
    CoordinateCouplerConstraint L2_L3_FE_con: independent_coordinate_names=flex_extension
        dependent_coordinate_name=L2_L3_FE scale_factor=1
        coupled_coordinates_function=LinearFunction(coefficients=0.231 0)
    CoordinateCouplerConstraint L2_L3_AR_con: independent_coordinate_names=axial_rotation
        dependent_coordinate_name=L2_L3_AR scale_factor=1
        coupled_coordinates_function=LinearFunction(coefficients=0.181818 0)
    CoordinateCouplerConstraint L2_L3_LB_con: independent_coordinate_names=lat_bending
        dependent_coordinate_name=L2_L3_LB scale_factor=1
        coupled_coordinates_function=LinearFunction(coefficients=0.250128 0)
    CoordinateCouplerConstraint L1_L2_FE_con: independent_coordinate_names=flex_extension
        dependent_coordinate_name=L1_L2_FE scale_factor=1
        coupled_coordinates_function=LinearFunction(coefficients=0.255 0)
    CoordinateCouplerConstraint L1_L2_AR_con: independent_coordinate_names=axial_rotation
        dependent_coordinate_name=L1_L2_AR scale_factor=1
        coupled_coordinates_function=LinearFunction(coefficients=0.168831 0)
    CoordinateCouplerConstraint L1_L2_LB_con: independent_coordinate_names=lat_bending
        dependent_coordinate_name=L1_L2_LB scale_factor=1
        coupled_coordinates_function=LinearFunction(coefficients=0.188 0)
    CoordinateCouplerConstraint aux7jnt_r1_con: independent_coordinate_names=roll2 dependent_coordinate_name=aux7jnt_r1
      coupled_coordinates_function: SimmSpline: x=(-1.74533 1.74533) y=(-0.23911 0.23911)
    CoordinateCouplerConstraint aux7jnt_r2_con: independent_coordinate_names=yaw2 dependent_coordinate_name=aux7jnt_r2
      coupled_coordinates_function: SimmSpline: x=(-1.74533 1.74533) y=(-0.328122 0.328122)
    CoordinateCouplerConstraint aux7jnt_r3_con: independent_coordinate_names=pitch2
        dependent_coordinate_name=aux7jnt_r3
      coupled_coordinates_function: SimmSpline: x=(-1.74533 1.74533) y=(-0.326377 0.326377)
    CoordinateCouplerConstraint aux6jnt_r1_con: independent_coordinate_names=roll2 dependent_coordinate_name=aux6jnt_r1
      coupled_coordinates_function: SimmSpline: x=(-1.74533 1.74533) y=(-0.274017 0.274017)
    CoordinateCouplerConstraint aux6jnt_r2_con: independent_coordinate_names=yaw2 dependent_coordinate_name=aux6jnt_r2
      coupled_coordinates_function: SimmSpline: x=(-1.74533 1.74533) y=(-0.382227 0.382227)
    CoordinateCouplerConstraint aux6jnt_r3_con: independent_coordinate_names=pitch2
        dependent_coordinate_name=aux6jnt_r3
      coupled_coordinates_function: SimmSpline: x=(-1.74533 1.74533) y=(-0.383972 0.383972)
    CoordinateCouplerConstraint aux5jnt_r1_con: independent_coordinate_names=roll2 dependent_coordinate_name=aux5jnt_r1
      coupled_coordinates_function: SimmSpline: x=(-1.74533 1.74533) y=(-0.376991 0.376991)
    CoordinateCouplerConstraint aux5jnt_r2_con: independent_coordinate_names=yaw2 dependent_coordinate_name=aux5jnt_r2
      coupled_coordinates_function: SimmSpline: x=(-1.74533 1.74533) y=(-0.382227 0.382227)
    CoordinateCouplerConstraint aux5jnt_r3_con: independent_coordinate_names=pitch2
        dependent_coordinate_name=aux5jnt_r3
      coupled_coordinates_function: SimmSpline: x=(-1.74533 1.74533) y=(-0.383972 0.383972)
    CoordinateCouplerConstraint aux4jnt_r1_con: independent_coordinate_names=roll2 dependent_coordinate_name=aux4jnt_r1
      coupled_coordinates_function: SimmSpline: x=(-1.74533 1.74533) y=(-0.376991 0.376991)
    CoordinateCouplerConstraint aux4jnt_r2_con: independent_coordinate_names=yaw2 dependent_coordinate_name=aux4jnt_r2
      coupled_coordinates_function: SimmSpline: x=(-1.74533 1.74533) y=(-0.382227 0.382227)
    CoordinateCouplerConstraint aux4jnt_r3_con: independent_coordinate_names=pitch2
        dependent_coordinate_name=aux4jnt_r3
      coupled_coordinates_function: SimmSpline: x=(-1.74533 1.74533) y=(-0.287979 0.287979)
    CoordinateCouplerConstraint aux3jnt_r1_con: independent_coordinate_names=roll2 dependent_coordinate_name=aux3jnt_r1
      coupled_coordinates_function: SimmSpline: x=(-1.74533 1.74533) y=(-0.342085 0.342085)
    CoordinateCouplerConstraint aux3jnt_r2_con: independent_coordinate_names=yaw2 dependent_coordinate_name=aux3jnt_r2
      coupled_coordinates_function: SimmSpline: x=(-1.74533 1.74533) y=(-0.164061 0.164061)
    CoordinateCouplerConstraint aux3jnt_r3_con: independent_coordinate_names=pitch2
        dependent_coordinate_name=aux3jnt_r3
      coupled_coordinates_function: SimmSpline: x=(-1.74533 1.74533) y=(-0.191986 0.191986)
    CoordinateCouplerConstraint aux1jnt_r1_con: independent_coordinate_names=roll1 dependent_coordinate_name=aux1jnt_r1
      coupled_coordinates_function: SimmSpline: x=(-1.74533 1.74533) y=(-0.872665 0.872665)
    CoordinateCouplerConstraint aux1jnt_r2_con: independent_coordinate_names=yaw1 dependent_coordinate_name=aux1jnt_r2
      coupled_coordinates_function: SimmSpline: x=(-1.74533 1.74533) y=(-0.193732 0.193732)
    CoordinateCouplerConstraint aux1jnt_r3_con: independent_coordinate_names=pitch1
        dependent_coordinate_name=aux1jnt_r3
      coupled_coordinates_function: SimmSpline: x=(-1.74533 1.74533) y=(-0.970403 0.970403)
  ForceSet:
    PointActuator Skull_Impact: appliesForce=false min_control=1 max_control=1 body=skull point=(0 0.2 0)
        direction=(0 0 1) force_is_global=true optimal_force=150
    TorqueActuator Skull_Moment: appliesForce=false min_control=1 max_control=1 bodyA=skull bodyB=ground
        torque_is_global=true axis=(0 1 0) optimal_force=20
    Millard2012EquilibriumMuscle [values shared by the 72 below unless stated]: ignore_tendon_compliance=true
        minimum_activation=0.01
      ActiveForceLengthCurve: min_norm_active_fiber_length=0.4441 transition_norm_fiber_length=0.73
          max_norm_active_fiber_length=1.8123 shallow_ascending_slope=0.8616 minimum_value=0
      ForceVelocityCurve: concentric_slope_at_vmax=0 concentric_slope_near_vmax=0.25 isometric_slope=5
          eccentric_slope_at_vmax=0 eccentric_slope_near_vmax=0.15 max_eccentric_velocity_force_multiplier=1.4
          concentric_curviness=0.6 eccentric_curviness=0.9
      FiberForceLengthCurve
      TendonForceLengthCurve
    Millard2012EquilibriumMuscle digastric_post: max_isometric_force=109.62 optimal_fiber_length=0.02132511
        tendon_slack_length=0.03550788 pennation_angle_at_optimal=0.2496 [radians]
      PathPoint digastricpost-P1: skull (-0.005775166 0.003218945 0.04515991)
      PathPoint digastricpost-P2: cerv3 (0.0253516 0.006520856 0.03134817)
    Millard2012EquilibriumMuscle digastric_ant: max_isometric_force=109.62 optimal_fiber_length=0.02120462
        tendon_slack_length=0.007466415 pennation_angle_at_optimal=0
      PathPoint digastricpost-P1: skull (0.02868648 -0.06087593 0.01637875)
      PathPoint digastricpost-P2: cerv1 (0.07961561 -0.06289294 0.006225943)
    Millard2012EquilibriumMuscle Geniohyoid: max_isometric_force=91.665 optimal_fiber_length=0.03058548
        tendon_slack_length=0.004833041 pennation_angle_at_optimal=0
      PathPoint digastricpost-P1: cerv1 (0.07834835 -0.05875389 0.005564496)
      PathPoint digastricpost-P2: skull (0.06542033 -0.06371618 0.001514798)
    Millard2012EquilibriumMuscle Mylohyoid_Post: max_isometric_force=50.085 optimal_fiber_length=0.03163574
        tendon_slack_length=0.0157207 pennation_angle_at_optimal=0
      PathPoint digastricpost-P1: cerv1 (0.08219336 -0.06103608 0.003386039)
      PathPoint digastricpost-P2: skull (0.03910072 -0.03682852 0.02755038)
    Millard2012EquilibriumMuscle Mylohyoid_Ant: max_isometric_force=150.255 optimal_fiber_length=0.02529563
        tendon_slack_length=0.003465501 pennation_angle_at_optimal=0 default_fiber_length=0.1
      PathPoint digastricpost-P1: cerv1 (0.1062233 -0.0619099 -0.003386039)
      PathPoint digastricpost-P2: skull (0.05481674 -0.05642621 0.01495863)
    Millard2012EquilibriumMuscle Stylohyoid_Lat: max_isometric_force=18.41786 optimal_fiber_length=0.0195524
        tendon_slack_length=0.05323195 pennation_angle_at_optimal=0.082
      PathPoint digastricpost-P1: skull (0.01069826 -0.0007573989 0.03559775)
      PathPoint digastricpost-P2: cerv1 (0.07027462 -0.0542675 0.01686466)
    Millard2012EquilibriumMuscle Stylohyoid_Med: max_isometric_force=18.41786 optimal_fiber_length=0.01954412
        tendon_slack_length=0.04684631 pennation_angle_at_optimal=0.08203
      PathPoint digastricpost-P1: skull (0.01117163 -0.001893497 0.03559775)
      PathPoint digastricpost-P2: cerv1 (0.0691037 -0.04921094 0.01775169)
    Millard2012EquilibriumMuscle Sterno_hyoid: max_isometric_force=54.81 optimal_fiber_length=0.07587645
        tendon_slack_length=0.03251848 pennation_angle_at_optimal=0
      PathPoint stern_mast-P1: cerv3 (0.06271818 -0.02527514 0.006870382)
      PathPoint default: torso (-0.01250642 0.2785225 0.01768171)
    Millard2012EquilibriumMuscle SternoThyroid: max_isometric_force=61.425 optimal_fiber_length=0.06098121
        tendon_slack_length=0.0261348 pennation_angle_at_optimal=0
      PathPoint stern_mast-P1: cerv3 (0.04414969 -0.0471424 0.0145272)
      PathPoint default: torso (-0.01305006 0.272489 0.01363559)
    Millard2012EquilibriumMuscle Omo_hyoid: max_isometric_force=70.875 optimal_fiber_length=0.05142408
        tendon_slack_length=0.02203889 pennation_angle_at_optimal=0
      PathPoint stern_mast-P1: cerv3 (0.05692915 -0.01518256 0.01441797)
      PathPoint default: torso (-0.01874492 0.3304893 0.03363445)
    Millard2012EquilibriumMuscle digastric_post_L: max_isometric_force=109.62 optimal_fiber_length=0.02132511
        tendon_slack_length=0.03550788 pennation_angle_at_optimal=0.2496
      PathPoint digastricpost-P1: skull (-0.005775166 0.003218945 -0.04515991)
      PathPoint digastricpost-P2: cerv3 (0.0253516 0.006520856 -0.03134817)
    Millard2012EquilibriumMuscle digastric_ant_L: max_isometric_force=109.62 optimal_fiber_length=0.02120462
        tendon_slack_length=0.007466415 pennation_angle_at_optimal=0
      PathPoint digastricpost-P1: skull (0.02868648 -0.06087593 -0.01637875)
      PathPoint digastricpost-P2: cerv1 (0.07961561 -0.06289294 -0.006225943)
    Millard2012EquilibriumMuscle Geniohyoid_L: max_isometric_force=91.665 optimal_fiber_length=0.03067131
        tendon_slack_length=0.004846603 pennation_angle_at_optimal=0
      PathPoint digastricpost-P1: cerv1 (0.07809156 -0.05878153 -0.006884713)
      PathPoint digastricpost-P2: skull (0.06542033 -0.06371618 -0.001514798)
    Millard2012EquilibriumMuscle Mylohyoid_Post_L: max_isometric_force=50.085 optimal_fiber_length=0.03163574
        tendon_slack_length=0.0157207 pennation_angle_at_optimal=0
      PathPoint digastricpost-P1: cerv1 (0.08219336 -0.06103608 -0.003386039)
      PathPoint digastricpost-P2: skull (0.03910072 -0.03682852 -0.02755038)
    Millard2012EquilibriumMuscle Mylohyoid_Ant_L: max_isometric_force=150.255 optimal_fiber_length=0.02529563
        tendon_slack_length=0.003465501 pennation_angle_at_optimal=0
      PathPoint digastricpost-P1: cerv1 (0.1062233 -0.0619099 0.003386039)
      PathPoint digastricpost-P2: skull (0.05481674 -0.05642621 -0.01495863)
    Millard2012EquilibriumMuscle Stylohyoid_Lat_L: max_isometric_force=18.41786 optimal_fiber_length=0.01956508
        tendon_slack_length=0.05326646 pennation_angle_at_optimal=0.082
      PathPoint digastricpost-P1: skull (0.01069826 -0.0007573989 -0.03559775)
      PathPoint digastricpost-P2: cerv1 (0.0695582 -0.0543444 -0.01786201)
    Millard2012EquilibriumMuscle Stylohyoid_Med_L: max_isometric_force=18.41786 optimal_fiber_length=0.01955849
        tendon_slack_length=0.04688075 pennation_angle_at_optimal=0.08203
      PathPoint digastricpost-P1: skull (0.01117163 -0.001893497 -0.03559775)
      PathPoint digastricpost-P2: cerv1 (0.06835124 -0.04929166 -0.01872239)
    Millard2012EquilibriumMuscle Sterno_hyoid_L: max_isometric_force=54.81 optimal_fiber_length=0.07587645
        tendon_slack_length=0.03251848 pennation_angle_at_optimal=0
      PathPoint stern_mast-P1: cerv3 (0.06271818 -0.02527514 -0.006870382)
      PathPoint default: torso (-0.01250642 0.2785225 -0.01768171)
    Millard2012EquilibriumMuscle SternoThyroid_L: max_isometric_force=61.425 optimal_fiber_length=0.06098121
        tendon_slack_length=0.0261348 pennation_angle_at_optimal=0
      PathPoint stern_mast-P1: cerv3 (0.04414969 -0.0471424 -0.0145272)
      PathPoint default: torso (-0.01305006 0.272489 -0.01363559)
    Millard2012EquilibriumMuscle Omo_hyoid_L: max_isometric_force=70.875 optimal_fiber_length=0.05142408
        tendon_slack_length=0.02203889 pennation_angle_at_optimal=0
      PathPoint stern_mast-P1: cerv3 (0.05692915 -0.01518256 -0.01441797)
      PathPoint default: torso (-0.01874492 0.3304893 -0.03363445)
    Millard2012EquilibriumMuscle stern_mast: max_isometric_force=186.165 optimal_fiber_length=0.1109509
        tendon_slack_length=0.05765643 pennation_angle_at_optimal=0.2617994
      PathPoint P1: torso (-0.0006238505 0.2913382 0.008555664)
      PathPoint P2: skull (-0.004828418 0.006560968 0.06087593)
    Millard2012EquilibriumMuscle stern_mast_L: max_isometric_force=186.165 optimal_fiber_length=0.1109509
        tendon_slack_length=0.05765643 pennation_angle_at_optimal=0.2617994
      PathPoint P1: torso (-0.0006238505 0.2913382 -0.008555664)
      PathPoint P2: skull (-0.004828418 0.006560968 -0.06087593)
    Millard2012EquilibriumMuscle cleid_mast: max_isometric_force=93.0825 optimal_fiber_length=0.1132013
        tendon_slack_length=0.03689313 pennation_angle_at_optimal=0.2617994
      PathPoint P1: rclavicle (0.003457914 0.004830385 0.03137077)
      PathPoint P2: skull (-0.004828418 0.006560968 0.06087593)
    Millard2012EquilibriumMuscle cleid_mast_L: max_isometric_force=93.0825 optimal_fiber_length=0.1132013
        tendon_slack_length=0.03689313 pennation_angle_at_optimal=0.2617994
      PathPoint P1: lclavicle (0.003457914 0.004830385 -0.03137077)
      PathPoint P2: skull (-0.004828418 0.006560968 -0.06087593)
    Millard2012EquilibriumMuscle cleid_occ: max_isometric_force=93.0825 optimal_fiber_length=0.1109717
        tendon_slack_length=0.07137842 pennation_angle_at_optimal=0.2617994
      PathPoint P1: rclavicle (0.003457914 0.004830385 0.03137077)
      PathPoint P2: skull (-0.0331362 0.02177522 0.06286411)
    Millard2012EquilibriumMuscle cleid_occ_L: max_isometric_force=93.0825 optimal_fiber_length=0.1109717
        tendon_slack_length=0.07137842 pennation_angle_at_optimal=0.2617994
      PathPoint P1: lclavicle (0.003457914 0.004830385 -0.03137077)
      PathPoint P2: skull (-0.0331362 0.02177522 -0.06286411)
    Millard2012EquilibriumMuscle scalenus_ant: max_isometric_force=138.915 optimal_fiber_length=0.04218496
        tendon_slack_length=0.05365625 pennation_angle_at_optimal=0.1745329
      PathPoint P1: torso (-0.01906309 0.2962933 0.04714527)
      PathPoint P2: cerv4 (0.00778789 0.008628938 0.02537345)
    Millard2012EquilibriumMuscle scalenus_ant_L: max_isometric_force=138.915 optimal_fiber_length=0.04218496
        tendon_slack_length=0.05365625 pennation_angle_at_optimal=0.1745329
      PathPoint P1: torso (-0.01906309 0.2962933 -0.04714527)
      PathPoint P2: cerv4 (0.00778789 0.008628938 -0.02537345)
    Millard2012EquilibriumMuscle scalenus_med: max_isometric_force=100.94 optimal_fiber_length=0.05106976
        tendon_slack_length=0.06282398 pennation_angle_at_optimal=0.1745329
      PathPoint P1: torso (-0.03028349 0.3059808 0.05587918)
      PathPoint P2: cerv3 (-0.009852281 0.01071517 0.02314521)
    Millard2012EquilibriumMuscle scalenus_med_L: max_isometric_force=100.94 optimal_fiber_length=0.05106976
        tendon_slack_length=0.06282398 pennation_angle_at_optimal=0.1745329
      PathPoint P1: torso (-0.03028349 0.3059808 -0.05587918)
      PathPoint P2: cerv3 (-0.009852281 0.01071517 -0.02314521)
    Millard2012EquilibriumMuscle scalenus_post: max_isometric_force=76.93 optimal_fiber_length=0.05799303
        tendon_slack_length=0.06813714 pennation_angle_at_optimal=0.1745329
      PathPoint P1: torso (-0.0324224 0.2786829 0.09464703)
      PathPoint P2: cerv5 (-0.003495266 0.01497503 0.02807136)
    Millard2012EquilibriumMuscle scalenus_post_L: max_isometric_force=76.93 optimal_fiber_length=0.05799303
        tendon_slack_length=0.06813714 pennation_angle_at_optimal=0.1745329
      PathPoint P1: torso (-0.0324224 0.2786829 -0.09464703)
      PathPoint P2: cerv5 (-0.003495266 0.01497503 -0.02807136)
    Millard2012EquilibriumMuscle long_cap_sklc4: max_isometric_force=89.964 optimal_fiber_length=0.04063856
        tendon_slack_length=0.04416449 pennation_angle_at_optimal=0.08726646
      PathPoint P1: cerv4 (0.007121605 0.01271403 0.02643295)
      PathPoint P2: cerv3 (0.01307448 0.01102101 0.02072037)
      PathPoint P3: cerv2 (0.01878705 0.009054924 0.01613284)
      PathPoint P4: cerv1 (0.06354831 0.003375116 0.01265942)
      PathPoint P5: skull (0.009278136 0.01511011 0.003408295)
    Millard2012EquilibriumMuscle long_cap_sklc4_L: max_isometric_force=89.964 optimal_fiber_length=0.04063856
        tendon_slack_length=0.04416449 pennation_angle_at_optimal=0.08726646
      PathPoint P1: cerv4 (0.007121605 0.01271403 -0.02643295)
      PathPoint P2: cerv3 (0.01307448 0.01102101 -0.02072037)
      PathPoint P3: cerv2 (0.01878705 0.009054924 -0.01613284)
      PathPoint P4: cerv1 (0.06354831 0.003375116 -0.01265942)
      PathPoint P5: skull (0.009278136 0.01511011 -0.003408295)
    Millard2012EquilibriumMuscle long_col_c1thx: max_isometric_force=32.319 optimal_fiber_length=0.09163162
        tendon_slack_length=0.0899754 pennation_angle_at_optimal=0.08726646
      PathPoint P1: torso (-0.04356259 0.2703412 0.003297495)
      PathPoint P2: cerv7 (0.02534068 0.001201498 0.004369083)
      PathPoint P3: cerv6 (0.02527514 0.002523145 0.004390928)
      PathPoint P4: cerv5 (0.02433579 0.002490377 0.004259855)
      PathPoint P5: cerv4 (0.02408457 0.003615416 0.004139706)
      PathPoint P6: cerv3 (0.02416103 0.006586392 0.004019556)
      PathPoint P7: cerv2 (0.02317798 0.01062779 0.003888483)
      PathPoint P8: cerv1 (0.06362476 0.005264744 0.003386039)
    Millard2012EquilibriumMuscle long_col_c1thx_L: max_isometric_force=32.319 optimal_fiber_length=0.09163162
        tendon_slack_length=0.0899754 pennation_angle_at_optimal=0.08726646
      PathPoint P1: torso (-0.04356259 0.2703412 -0.003297495)
      PathPoint P2: cerv7 (0.02534068 0.001201498 -0.004369083)
      PathPoint P3: cerv6 (0.02527514 0.002523145 -0.004390928)
      PathPoint P4: cerv5 (0.02433579 0.002490377 -0.004259855)
      PathPoint P5: cerv4 (0.02408457 0.003615416 -0.004139706)
      PathPoint P6: cerv3 (0.02416103 0.006586392 -0.004019556)
      PathPoint P7: cerv2 (0.02317798 0.01062779 -0.003888483)
      PathPoint P8: cerv1 (0.06362476 0.005264744 -0.003386039)
    Millard2012EquilibriumMuscle long_col_c1c5: max_isometric_force=32.319 optimal_fiber_length=0.03923436
        tendon_slack_length=0.03849052 pennation_angle_at_optimal=0.08726646
      PathPoint P1: cerv5 (0.007307291 0.009710286 0.02599604)
      PathPoint P2: cerv4 (0.01224435 0.008181107 0.02261)
      PathPoint P3: cerv2 (0.01899459 0.00173671 0.01490949)
      PathPoint P4: cerv1 (0.06253249 0.005264744 0.006772078)
    Millard2012EquilibriumMuscle long_col_c1c5_L: max_isometric_force=32.319 optimal_fiber_length=0.03923436
        tendon_slack_length=0.03849052 pennation_angle_at_optimal=0.08726646
      PathPoint P1: cerv5 (0.007307291 0.009710286 -0.02599604)
      PathPoint P2: cerv4 (0.01224435 0.008181107 -0.02261)
      PathPoint P3: cerv2 (0.01899459 0.00173671 -0.01490949)
      PathPoint P4: cerv1 (0.06253249 0.005264744 -0.006772078)
    Millard2012EquilibriumMuscle long_col_c5thx: max_isometric_force=32.319 optimal_fiber_length=0.05696208
        tendon_slack_length=0.05420598 pennation_angle_at_optimal=0.08726646
      PathPoint P1: torso (-0.04439142 0.2700025 0.006060262)
      PathPoint P2: torso (-0.04300112 0.2854294 0.009108217)
      PathPoint P3: torso (-0.04069288 0.2982273 0.01191554)
      PathPoint P4: torso (-0.03980166 0.3062215 0.01343952)
      PathPoint P5: torso (-0.0377786 0.3189035 0.0158458)
      PathPoint P6: cerv7 (0.01213513 0.007984498 0.02161604)
      PathPoint P7: cerv6 (0.01049672 0.00778789 0.02420472)
      PathPoint P8: cerv5 (0.007307291 0.009710286 0.02599604)
    Millard2012EquilibriumMuscle long_col_c5thx_L: max_isometric_force=32.319 optimal_fiber_length=0.05696208
        tendon_slack_length=0.05420598 pennation_angle_at_optimal=0.08726646
      PathPoint P1: torso (-0.04439142 0.2700025 -0.006060262)
      PathPoint P2: torso (-0.04300112 0.2854294 -0.009108217)
      PathPoint P3: torso (-0.04069288 0.2982273 -0.01191554)
      PathPoint P4: torso (-0.03980166 0.3062215 -0.01343952)
      PathPoint P5: torso (-0.0377786 0.3189035 -0.0158458)
      PathPoint P6: cerv7 (0.01213513 0.007984498 -0.02161604)
      PathPoint P7: cerv6 (0.01049672 0.00778789 -0.02420472)
      PathPoint P8: cerv5 (0.007307291 0.009710286 -0.02599604)
    Millard2012EquilibriumMuscle trap_cl: max_isometric_force=108.64 optimal_fiber_length=0.08366179
        tendon_slack_length=0.118742 pennation_angle_at_optimal=0.5235988
      PathPoint P1: rclavicle (-0.02620172 0.02067619 0.07744658)
      PathPoint P2: skull (-0.07603338 0.02465333 0.01253495)
    Millard2012EquilibriumMuscle trap_cl_L: max_isometric_force=108.64 optimal_fiber_length=0.08366179
        tendon_slack_length=0.118742 pennation_angle_at_optimal=0.5235988
      PathPoint P1: lclavicle (-0.02620172 0.02067619 -0.07744658)
      PathPoint P2: skull (-0.07603338 0.02465333 -0.01253495)
    Millard2012EquilibriumMuscle trap_acr: max_isometric_force=527.73 optimal_fiber_length=0.0837724
        tendon_slack_length=0.06973324 pennation_angle_at_optimal=0
      PathPoint P1: rscapula (-0.021202 -0.008163529 -0.006559342)
      PathPoint P2: cerv7 (-0.05210131 0.02075314 0.003331425)
    Millard2012EquilibriumMuscle trap_acr_L: max_isometric_force=527.73 optimal_fiber_length=0.0837724
        tendon_slack_length=0.06973324 pennation_angle_at_optimal=0
      PathPoint P1: lscapula (-0.021202 -0.008163529 0.006559342)
      PathPoint P2: cerv7 (-0.05210131 0.02075314 -0.003331425)
    Millard2012EquilibriumMuscle splen_cap_sklc6: max_isometric_force=69.314 optimal_fiber_length=0.1002932
        tendon_slack_length=0.0274624 pennation_angle_at_optimal=0
      PathPoint P1: cerv6 (-0.05308435 0.0179897 0.003331425)
      PathPoint P2: skull (-0.05835758 0.01815864 0.04165694)
    Millard2012EquilibriumMuscle splen_cap_sklc6_L: max_isometric_force=69.314 optimal_fiber_length=0.1002932
        tendon_slack_length=0.0274624 pennation_angle_at_optimal=0
      PathPoint P1: cerv6 (-0.05308435 0.0179897 -0.003331425)
      PathPoint P2: skull (-0.05835758 0.01815864 -0.04165694)
    Millard2012EquilibriumMuscle splen_cap_sklthx: max_isometric_force=69.314 optimal_fiber_length=0.09878512
        tendon_slack_length=0.08512262 pennation_angle_at_optimal=0
      PathPoint P1: torso (-0.09254376 0.3021397 0.002673645)
      PathPoint P2: skull (-0.03802142 0.01041423 0.05134218)
    Millard2012EquilibriumMuscle splen_cap_sklthx_L: max_isometric_force=69.314 optimal_fiber_length=0.09878512
        tendon_slack_length=0.08512262 pennation_angle_at_optimal=0
      PathPoint P1: torso (-0.09254376 0.3021397 -0.002673645)
      PathPoint P2: skull (-0.03802142 0.01041423 -0.05134218)
    Millard2012EquilibriumMuscle splen_cerv_c3thx: max_isometric_force=69.314 optimal_fiber_length=0.09224536
        tendon_slack_length=0.1052937 pennation_angle_at_optimal=0
      PathPoint P1: torso (-0.1145033 0.2336944 0.003653981)
      PathPoint P2: cerv3 (-0.00859617 0.01097732 0.0258322)
    Millard2012EquilibriumMuscle splen_cerv_c3thx_L: max_isometric_force=69.314 optimal_fiber_length=0.09224536
        tendon_slack_length=0.1052937 pennation_angle_at_optimal=0
      PathPoint P1: torso (-0.1145033 0.2336944 -0.003653981)
      PathPoint P2: cerv3 (-0.00859617 0.01097732 -0.0258322)
    Millard2012EquilibriumMuscle semi_cap_sklc5: max_isometric_force=89.67 optimal_fiber_length=0.06954732
        tendon_slack_length=0.0476215 pennation_angle_at_optimal=0.08726646
      PathPoint P1: cerv5 (-0.01016904 0.0126048 0.02566836)
      PathPoint P2: skull (-0.07044756 0.01893497 0.01704147)
    Millard2012EquilibriumMuscle semi_cap_sklc5_L: max_isometric_force=89.67 optimal_fiber_length=0.06954732
        tendon_slack_length=0.0476215 pennation_angle_at_optimal=0.08726646
      PathPoint P1: cerv5 (-0.01016904 0.0126048 -0.02566836)
      PathPoint P2: skull (-0.07044756 0.01893497 -0.01704147)
    Millard2012EquilibriumMuscle semi_cap_sklthx: max_isometric_force=89.67 optimal_fiber_length=0.07367346
        tendon_slack_length=0.07463771 pennation_angle_at_optimal=0.08726646
      PathPoint P1: torso (-0.07610085 0.3362732 0.03092516)
      PathPoint P2: skull (-0.07262508 0.01893497 0.01050891)
    Millard2012EquilibriumMuscle semi_cap_sklthx_L: max_isometric_force=89.67 optimal_fiber_length=0.07367346
        tendon_slack_length=0.07463771 pennation_angle_at_optimal=0.08726646
      PathPoint P1: torso (-0.07610085 0.3362732 -0.03092516)
      PathPoint P2: skull (-0.07262508 0.01893497 -0.01050891)
    Millard2012EquilibriumMuscle semi_cerv_c3thx: max_isometric_force=89.67 optimal_fiber_length=0.07117951
        tendon_slack_length=0.02865394 pennation_angle_at_optimal=0.08726646
      PathPoint P1: torso (-0.07928249 0.3118985 0.02323397)
      PathPoint P2: cerv3 (-0.04438988 -0.003517111 0.00262145)
    Millard2012EquilibriumMuscle semi_cerv_c3thx_L: max_isometric_force=89.67 optimal_fiber_length=0.07117951
        tendon_slack_length=0.02865394 pennation_angle_at_optimal=0.08726646
      PathPoint P1: torso (-0.07928249 0.3118985 -0.02323397)
      PathPoint P2: cerv3 (-0.04438988 -0.003517111 -0.00262145)
    Millard2012EquilibriumMuscle levator_scap: max_isometric_force=106.82 optimal_fiber_length=0.1133665
        tendon_slack_length=0.02194595 pennation_angle_at_optimal=0
      PathPoint P1: rscapula (-0.08688455 -0.03229763 -0.07259837)
      PathPoint P2: cerv2 (-0.01295433 0.007918962 0.02316706)
    Millard2012EquilibriumMuscle levator_scap_L: max_isometric_force=106.82 optimal_fiber_length=0.1133665
        tendon_slack_length=0.02194595 pennation_angle_at_optimal=0
      PathPoint P1: lscapula (-0.08688455 -0.03229763 0.07259837)
      PathPoint P2: cerv2 (-0.01295433 0.007918962 -0.02316706)
    Millard2012EquilibriumMuscle longissi_cap_sklc6: max_isometric_force=43.652 optimal_fiber_length=0.07618825
        tendon_slack_length=0.02539184 pennation_angle_at_optimal=0
      PathPoint P1: cerv6 (-0.008923851 0.0165479 0.03013575)
      PathPoint P2: skull (-0.03256815 0.004828418 0.05207117)
    Millard2012EquilibriumMuscle longissi_cap_sklc6_L: max_isometric_force=43.652 optimal_fiber_length=0.07618825
        tendon_slack_length=0.02539184 pennation_angle_at_optimal=0
      PathPoint P1: cerv6 (-0.008923851 0.0165479 -0.03013575)
      PathPoint P2: skull (-0.03256815 0.004828418 -0.05207117)
    Millard2012EquilibriumMuscle longissi_cerv_c4thx: max_isometric_force=28.07 optimal_fiber_length=0.1273953
        tendon_slack_length=0.04091034 pennation_angle_at_optimal=0
      PathPoint P1: torso (-0.09798018 0.2458506 0.02865256)
      PathPoint P2: torso (-0.09730285 0.2694856 0.02710185)
      PathPoint P3: torso (-0.08892543 0.291356 0.02601457)
      PathPoint P4: torso (-0.07245578 0.3324232 0.0248649)
      PathPoint P5: cerv4 (-0.007744199 0.01263757 0.02850826)
    Millard2012EquilibriumMuscle longissi_cerv_c4thx_L: max_isometric_force=28.07 optimal_fiber_length=0.1273953
        tendon_slack_length=0.04091034 pennation_angle_at_optimal=0
      PathPoint P1: torso (-0.09798018 0.2458506 -0.02865256)
      PathPoint P2: torso (-0.09730285 0.2694856 -0.02710185)
      PathPoint P3: torso (-0.08892543 0.291356 -0.02601457)
      PathPoint P4: torso (-0.07245578 0.3324232 -0.0248649)
      PathPoint P5: cerv4 (-0.007744199 0.01263757 -0.02850826)
    Millard2012EquilibriumMuscle iliocost_cerv_c5rib: max_isometric_force=28.07 optimal_fiber_length=0.07738601
        tendon_slack_length=0.02459095 pennation_angle_at_optimal=0
      PathPoint P1: torso (-0.09223184 0.2922918 0.04750176)
      PathPoint P2: torso (-0.07463034 0.3354355 0.03596052)
      PathPoint P3: cerv5 (-0.01026734 0.01374076 0.02839904)
    Millard2012EquilibriumMuscle iliocost_cerv_c5rib_L: max_isometric_force=28.07 optimal_fiber_length=0.07738601
        tendon_slack_length=0.02459095 pennation_angle_at_optimal=0
      PathPoint P1: torso (-0.09223184 0.2922918 -0.04750176)
      PathPoint P2: torso (-0.07463034 0.3354355 -0.03596052)
      PathPoint P3: cerv5 (-0.01026734 0.01374076 -0.02839904)
    Millard2012EquilibriumMuscle rectcap_post_maj: max_isometric_force=45.668 optimal_fiber_length=0.03743062
        tendon_slack_length=0.02309773 pennation_angle_at_optimal=0.08726646
      PathPoint P1: cerv2 (-0.03972588 -0.007066991 0.00262145)
      PathPoint P2: skull (-0.05718361 0.008520737 0.02177522)
    Millard2012EquilibriumMuscle rectcap_post_maj_L: max_isometric_force=45.668 optimal_fiber_length=0.03743062
        tendon_slack_length=0.02309773 pennation_angle_at_optimal=0.08726646
      PathPoint P1: cerv2 (-0.03972588 -0.007066991 -0.00262145)
      PathPoint P2: skull (-0.05718361 0.008520737 -0.02177522)
    Millard2012EquilibriumMuscle rectcap_post_min: max_isometric_force=25.088 optimal_fiber_length=0.01653318
        tendon_slack_length=0.01470322 pennation_angle_at_optimal=0.08726646
      PathPoint P1: cerv1 (7.645894e-5 0.0009830436 0.006662851)
      PathPoint P2: skull (-0.06314813 0.008520737 0.01372785)
    Millard2012EquilibriumMuscle rectcap_post_min_L: max_isometric_force=25.088 optimal_fiber_length=0.01653318
        tendon_slack_length=0.01470322 pennation_angle_at_optimal=0.08726646
      PathPoint P1: cerv1 (7.645894e-5 0.0009830436 -0.006662851)
      PathPoint P2: skull (-0.06314813 0.008520737 -0.01372785)
    Millard2012EquilibriumMuscle obl_cap_sup: max_isometric_force=51.107 optimal_fiber_length=0.0240534
        tendon_slack_length=0.01964393 pennation_angle_at_optimal=0.1745329
      PathPoint P1: cerv1 (0.03828409 0.004205242 0.04587537)
      PathPoint P2: skull (-0.0450463 0.008814229 0.03614686)
    Millard2012EquilibriumMuscle obl_cap_sup_L: max_isometric_force=51.107 optimal_fiber_length=0.0240534
        tendon_slack_length=0.01964393 pennation_angle_at_optimal=0.1745329
      PathPoint P1: cerv1 (0.03828409 0.004205242 -0.04587537)
      PathPoint P2: skull (-0.0450463 0.008814229 -0.03614686)
    Millard2012EquilibriumMuscle obl_cap_inf: max_isometric_force=63.406 optimal_fiber_length=0.04150628
        tendon_slack_length=0.01704707 pennation_angle_at_optimal=0
      PathPoint P1: cerv2 (-0.03972588 -0.007066991 0.00597472)
      PathPoint P2: cerv1 (0.03272443 0.003812024 0.04140798)
    Millard2012EquilibriumMuscle obl_cap_inf_L: max_isometric_force=63.406 optimal_fiber_length=0.04150628
        tendon_slack_length=0.01704707 pennation_angle_at_optimal=0
      PathPoint P1: cerv2 (-0.03972588 -0.007066991 -0.00597472)
      PathPoint P2: cerv1 (0.03272443 0.003812024 -0.04140798)
    BushingForce [values shared by the 8 below unless stated]: translational_stiffness=(0 0 0) [N/m]
        translational_damping=(0 0 0) [N/(m/s)]
    BushingForce Spine_C7_Bushing: socket_frame1=/bodyset/torso socket_frame2=/bodyset/cerv7
        rotational_stiffness=(27.5 13.75 27.5) [Nm/rad] rotational_damping=(2.75 1.375 2.75) [Nm/(rad/s)]
    BushingForce C7_C6_Bushing: socket_frame1=/bodyset/cerv7 socket_frame2=/bodyset/cerv6
        rotational_stiffness=(27.5 13.75 27.5) rotational_damping=(2.75 1.375 2.75)
    BushingForce C6_C5_Bushing: socket_frame1=/bodyset/cerv6 socket_frame2=/bodyset/cerv5
        rotational_stiffness=(27.5 13.75 27.5) rotational_damping=(2.75 1.375 2.75)
    BushingForce C5_C4_Bushing: socket_frame1=/bodyset/cerv5 socket_frame2=/bodyset/cerv4
        rotational_stiffness=(23.2 11.6 23.2) rotational_damping=(2.32 1.16 2.32)
    BushingForce C4_C3_Bushing: socket_frame1=/bodyset/cerv4 socket_frame2=/bodyset/cerv3
        rotational_stiffness=(23.2 11.6 23.2) rotational_damping=(2.32 1.16 2.32)
    BushingForce C3_C2_Bushing: socket_frame1=/bodyset/cerv3 socket_frame2=/bodyset/cerv2
        rotational_stiffness=(7.8 3.9 7.8) rotational_damping=(0.78 0.39 0.78)
    BushingForce C2_C1_Bushing: socket_frame1=/bodyset/cerv2 socket_frame2=/bodyset/cerv1
        rotational_stiffness=(7.8 3.9 7.8) rotational_damping=(0.78 0.39 0.78)
    BushingForce C1_skull_Bushing: socket_frame1=/bodyset/cerv1 socket_frame2=/bodyset/skull
        rotational_stiffness=(7.8 3.9 7.8) rotational_damping=(0.78 0.39 0.78)
    ObjectGroup hyoid: members=(Sterno_hyoid Omo_hyoid SternoThyroid digastric_post digastric_ant Geniohyoid Mylohyoid_Post Mylohyoid_Ant Stylohyoid_Lat Stylohyoid_Med Sterno_hyoid_L Omo_hyoid_L SternoThyroid_L digastric_post_L digastric_ant_L Geniohyoid_L Mylohyoid_Post_L Mylohyoid_Ant_L Stylohyoid_Lat_L Stylohyoid_Med_L)
    ObjectGroup sterno: members=(cleid_mast cleid_occ stern_mast cleid_mast_L cleid_occ_L stern_mast_L)
    ObjectGroup flexion: members=(cleid_mast cleid_occ long_cap_sklc4 long_col_c1c5 long_col_c1thx long_col_c5thx scalenus_ant stern_mast cleid_mast_L cleid_occ_L long_cap_sklc4_L long_col_c1c5_L long_col_c1thx_L long_col_c5thx_L scalenus_ant_L stern_mast_L)
    ObjectGroup rotation_contra: members=(cleid_mast cleid_occ long_cap_sklc4 long_col_c1c5 obl_cap_sup semi_cap_sklc5 semi_cap_sklthx semi_cerv_c3thx stern_mast trap_acr trap_cl)
    ObjectGroup lat_bending: members=(cleid_mast cleid_occ iliocost_cerv_c5rib levator_scap long_cap_sklc4 long_col_c1c5 long_col_c1thx long_col_c5thx longissi_cap_sklc6 longissi_cerv_c4thx obl_cap_inf obl_cap_sup rectcap_post_maj scalenus_ant scalenus_med scalenus_post semi_cap_sklc5 semi_cap_sklthx semi_cerv_c3thx splen_cap_sklc6 splen_cap_sklthx splen_cerv_c3thx stern_mast trap_acr trap_cl)
    ObjectGroup scalenus: members=(scalenus_ant scalenus_med scalenus_post)
    ObjectGroup extension: members=(iliocost_cerv_c5rib levator_scap longissi_cap_sklc6 longissi_cerv_c4thx obl_cap_inf obl_cap_sup rectcap_post_maj rectcap_post_min scalenus_med scalenus_post semi_cap_sklc5 semi_cap_sklthx semi_cerv_c3thx splen_cap_sklc6 splen_cap_sklthx splen_cerv_c3thx trap_acr trap_cl)
    ObjectGroup rotation_ipsi: members=(iliocost_cerv_c5rib levator_scap long_col_c5thx longissi_cap_sklc6 longissi_cerv_c4thx obl_cap_inf rectcap_post_maj scalenus_med scalenus_post splen_cap_sklc6 splen_cap_sklthx splen_cerv_c3thx)
    ObjectGroup longus: members=(long_cap_sklc4 long_col_c1c5 long_col_c1thx long_col_c5thx)
    ObjectGroup trapezius: members=(trap_acr trap_cl)
    ObjectGroup splenius: members=(splen_cap_sklc6 splen_cap_sklthx splen_cerv_c3thx)
    ObjectGroup semispinalis: members=(semi_cap_sklc5 semi_cap_sklthx semi_cerv_c3thx)
    ObjectGroup levator_scap: members=levator_scap
    ObjectGroup erectorspinae: members=(iliocost_cerv_c5rib longissi_cap_sklc6 longissi_cerv_c4thx)
    ObjectGroup suboccipital: members=(obl_cap_inf obl_cap_sup rectcap_post_maj rectcap_post_min)
    ObjectGroup multifidus
  MarkerSet:
    Marker HY: cerv5 (0.0563789 0.00555291 0)
    Marker RUN: cerv2 (0 0 0.065)
    Marker LUN: cerv2 (0 0 -0.065)
    Marker SJN: torso (0.02 0.37 0)
    Marker GLA: skull (0.1051821 0.06414171 -0.0006908302)
    Marker RZF: skull (0.09245563 0.01456368 0.05025658)
    Marker LZF: skull (0.0925091 0.01758145 -0.04568995)
    Marker RZP: skull (0.02689463 0.02116699 0.07962928)
    Marker LZP: skull (0.02611845 0.02160888 -0.08131371)
    Marker RCAJ: rscapula (0.0158943 -0.00338252 -0.00408092)
    Marker LCAJ: lscapula (0.0158943 -0.00574546 0.0087078)
    Marker RC: rclavicle (0.0103243 0.0133447 0.0457172)
    Marker LC: lclavicle (0.0103243 0.0133447 -0.0457172)
    Marker RN: cerv5 (-0.000875539 -0.00848499 0.0673963)
    Marker LN: cerv5 (0.00283021 -0.00202623 -0.0634793)
    Marker RHJ: pelvis (-0.07075575 -0.07384057 0.06652267)
    Marker LHJ: pelvis (-0.070756 -0.073841 -0.066523)
    Marker RASIS: pelvis (-0.058543 0.062645 0.100024)
    Marker LASIS: pelvis (-0.0585433 0.06264511 -0.1000245)
    Marker C7: cerv7 (-0.04834408 0.01759783 -0.000128411)
    Marker L5: lumbar5 (-0.04562849 0.01617128 0)
    Marker L1: lumbar1 (-0.05633509 -0.0152754 0)
    Marker T12: torso (-0.06947122 0.09338361 0.0006532043)
    Marker T1: torso (-0.07449686 0.3743723 0.0004777393)
